<neuroml xmlns="http://www.neuroml.org/schema/neuroml2"  xmlns:xs="http://www.w3.org/2001/XMLSchema" xmlns:xsi="http://www.w3.org/2001/XMLSchema-instance" xsi:schemaLocation="http://www.neuroml.org/schema/neuroml2 https://raw.github.com/NeuroML/NeuroML2/development/Schemas/NeuroML2/NeuroML_v2beta4.xsd" id="SimpleNet">
    <expTwoSynapse id="syn0" erev="0mV" gbase="2nS" tauDecay="10ms" tauRise="0.5ms"/>
    <izhikevich2007Cell id="RS" C="100 pF" a="0.01 per_ms" c="-60 mV" b="5 nS" d="400 pA" vpeak="50 mV" k="3 nS_per_mV" v0="-60mV" vr="-60 mV" vt="-50 mV"/>
    <poissonFiringSynapse id="poissonFiringSyn" synapse="syn0" averageRate="50 Hz" spikeTarget="./syn0"/>
    <network id="SimpleNet_network">
        <population id="Pop0" component="RS" size="3"/>
        <explicitInput input="poissonFiringSyn" destination="synapses" target="Pop0[0]"/>
        <explicitInput input="poissonFiringSyn" destination="synapses" target="Pop0[1]"/>
        <explicitInput input="poissonFiringSyn" destination="synapses" target="Pop0[2]"/>
    </network>
</neuroml>
