<neuroml xmlns="http://www.neuroml.org/schema/neuroml2"  xmlns:xs="http://www.w3.org/2001/XMLSchema" xmlns:xsi="http://www.w3.org/2001/XMLSchema-instance" xsi:schemaLocation="http://www.neuroml.org/schema/neuroml2 https://raw.github.com/NeuroML/NeuroML2/development/Schemas/NeuroML2/NeuroML_v2beta5.xsd" id="ACNet">
    <notes>

This NeuroML 2 file was generated by OpenCortex v0.0.6 using:
    libNeuroML v0.2.21
    pyNeuroML v0.2.1

    </notes>
    <property tag="Python random seed" value="1234"/>
    <include href="ACNet/pyr_4_sym.cell.nml"></include>
    <include href="ACNet/Ca_conc.nml"></include>
    <include href="ACNet/Ca_pyr.channel.nml"></include>
    <include href="ACNet/Kahp_pyr.channel.nml"></include>
    <include href="ACNet/Kdr_pyr.channel.nml"></include>
    <include href="ACNet/LeakConductance_pyr.channel.nml"></include>
    <include href="ACNet/Na_pyr.channel.nml"></include>
    <include href="ACNet/bask.cell.nml"></include>
    <include href="ACNet/Kdr_bask.channel.nml"></include>
    <include href="ACNet/LeakConductance_bask.channel.nml"></include>
    <include href="ACNet/Na_bask.channel.nml"></include>
    <expTwoSynapse id="syn0" gbase="1nS" erev="0mV" tauDecay="10ms" tauRise="0.5ms"/>
    <expTwoSynapse id="syn1" gbase="2nS" erev="0mV" tauDecay="15ms" tauRise="1ms"/>
    <poissonFiringSynapse id="poissonFiringSyn" averageRate="150 Hz" synapse="syn0" spikeTarget="./syn0"/>
    <network id="ACNet" type="networkWithTemperature" temperature="32degC">
        <population id="pop_pyr" component="pyr_4_sym" size="48" type="populationList">
            <instance id="0">
                <location x="483.226767845999973" y="88.146519835099994" z="3.74573502929"/>
            </instance>
            <instance id="1">
                <location x="455.487981224999999" y="187.853799473000009" z="291.113786528999981"/>
            </instance>
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        </population>
        <population id="pop_bask" component="bask" size="12" type="populationList">
            <instance id="0">
                <location x="411.418462823000027" y="76.240217590900002" z="437.142889631000003"/>
            </instance>
            <instance id="1">
                <location x="480.012332200999992" y="107.497544038000001" z="460.533679666000012"/>
            </instance>
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        </population>
        <projection id="proj0_pop_pyr_pop_bask" presynapticPopulation="pop_pyr" postsynapticPopulation="pop_bask" synapse="syn1">
            <connectionWD id="0" preCellId="../pop_pyr/0/pyr_4_sym" postCellId="../pop_bask/0/bask" weight="1." delay="1 ms"/>
            <connectionWD id="1" preCellId="../pop_pyr/0/pyr_4_sym" postCellId="../pop_bask/9/bask" weight="1." delay="1 ms"/>
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        </projection>
        <inputList id="Stim0" population="pop_pyr" component="poissonFiringSyn">
            <input id="0" target="../pop_pyr/0/pyr_4_sym" destination="synapses"/>
            <input id="1" target="../pop_pyr/1/pyr_4_sym" destination="synapses"/>
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        </inputList>
    </network>
</neuroml>
