<Lems>

    <!--

        This LEMS file has been automatically generated using PyNeuroML v0.1.11 (libNeuroML v0.2.12)

     -->

    <!-- Specify which component to run -->
    <Target component="Sim_IClamps"/>

    <!-- Include core NeuroML2 ComponentType definitions -->
    <Include file="Cells.xml"/>
    <Include file="Networks.xml"/>
    <Include file="Simulation.xml"/>

    <Include file="CaDynamics_E2_NML2.nml"/>
    <Include file="IClamps.net.nml"/>

    <Simulation id="Sim_IClamps" length="500ms" step="0.025ms" target="IClamps" seed="12345">  <!-- Note seed: ensures same random numbers used every run -->

        <Display id="DispPop__popIzh" title="Membrane potentials of cells in popIzh" timeScale="1ms" xmin="-50.0" xmax="550.0" ymin="-90" ymax="50">
            <Line id="popIzh[0]: v" quantity="popIzh/0/RS/v" scale="1mV" color="#6aa799" timeScale="1ms"/>
        </Display>

        <Display id="DispPop__popHH" title="Membrane potentials of cells in popHH" timeScale="1ms" xmin="-50.0" xmax="550.0" ymin="-90" ymax="50">
            <Line id="popHH[0]: v" quantity="popHH/0/pyr_4_sym_soma/v" scale="1mV" color="#029a72" timeScale="1ms"/>
        </Display>

        <Display id="DispPop__popBBP" title="Membrane potentials of cells in popBBP" timeScale="1ms" xmin="-50.0" xmax="550.0" ymin="-90" ymax="50">
            <Line id="popBBP[0]: v" quantity="popBBP/0/cADpyr229_L23_PC_5ecbf9b163_0_0/v" scale="1mV" color="#d340bb" timeScale="1ms"/>
        </Display>

        <OutputFile id="Volts_file__popIzh" fileName="Sim_IClamps.popIzh.v.dat">
            <OutputColumn id="v_popIzh_0_RS_v" quantity="popIzh/0/RS/v"/>
        </OutputFile>

        <OutputFile id="Volts_file__popHH" fileName="Sim_IClamps.popHH.v.dat">
            <OutputColumn id="v_popHH_0_pyr_4_sym_soma_v" quantity="popHH/0/pyr_4_sym_soma/v"/>
        </OutputFile>

        <OutputFile id="Volts_file__popBBP" fileName="Sim_IClamps.popBBP.v.dat">
            <OutputColumn id="v_popBBP_0_cADpyr229_L23_PC_5ecbf9b163_0_0_v" quantity="popBBP/0/cADpyr229_L23_PC_5ecbf9b163_0_0/v"/>
        </OutputFile>

    </Simulation>

</Lems>
