<Lems>

    <!--

        This LEMS file has been automatically generated using PyNeuroML v0.1.11 (libNeuroML v0.2.14)

     -->

    <!-- Specify which component to run -->
    <Target component="Sim_L23TraubDemo"/>

    <!-- Include core NeuroML2 ComponentType definitions -->
    <Include file="Cells.xml"/>
    <Include file="Networks.xml"/>
    <Include file="Simulation.xml"/>

    <Include file="L23TraubDemo/L23PyrRS.cell.nml"/>
    <Include file="L23TraubDemo/ar__m00_25.channel.nml"/>
    <Include file="L23TraubDemo/cad__beta0_01__phi26000.nml"/>
    <Include file="L23TraubDemo/cad__beta0_05__phi52000.nml"/>
    <Include file="L23TraubDemo/cal.channel.nml"/>
    <Include file="L23TraubDemo/cat.channel.nml"/>
    <Include file="L23TraubDemo/k2.channel.nml"/>
    <Include file="L23TraubDemo/ka.channel.nml"/>
    <Include file="L23TraubDemo/kahp.channel.nml"/>
    <Include file="L23TraubDemo/kc.channel.nml"/>
    <Include file="L23TraubDemo/kdr.channel.nml"/>
    <Include file="L23TraubDemo/km.channel.nml"/>
    <Include file="L23TraubDemo/naf__a0__b0__c0__d0__fastNa_shiftmin3_5.channel.nml"/>
    <Include file="L23TraubDemo/nap.channel.nml"/>
    <Include file="L23TraubDemo/pas.channel.nml"/>
    <Include file="L23TraubDemo/SupBasket.cell.nml"/>
    <Include file="L23TraubDemo/ar__m00_25.channel.nml"/>
    <Include file="L23TraubDemo/cad__beta0_02__phi260000.nml"/>
    <Include file="L23TraubDemo/cad__beta0_05__phi520000.nml"/>
    <Include file="L23TraubDemo/cal.channel.nml"/>
    <Include file="L23TraubDemo/cat.channel.nml"/>
    <Include file="L23TraubDemo/k2.channel.nml"/>
    <Include file="L23TraubDemo/ka.channel.nml"/>
    <Include file="L23TraubDemo/kahp_slower.channel.nml"/>
    <Include file="L23TraubDemo/kc_fast.channel.nml"/>
    <Include file="L23TraubDemo/kdr_fs.channel.nml"/>
    <Include file="L23TraubDemo/km.channel.nml"/>
    <Include file="L23TraubDemo/naf2__a0__b0__c0__d0__fastNa_shiftmin2_5.channel.nml"/>
    <Include file="L23TraubDemo/nap.channel.nml"/>
    <Include file="L23TraubDemo/pas.channel.nml"/>
    <Include file="L23TraubDemo.net.nml"/>

    <Simulation id="Sim_L23TraubDemo" length="300ms" step="0.025ms" target="L23TraubDemo" seed="12345">  <!-- Note seed: ensures same random numbers used every run -->

        <Display id="DispPop__pop_pre" title="Membrane potentials of cells in pop_pre" timeScale="1ms" xmin="-30.0" xmax="330.0" ymin="-90" ymax="50">
            <Line id="pop_pre[0]: v" quantity="pop_pre/0/L23PyrRS/v" scale="1mV" color="#6aa799" timeScale="1ms"/>
            <Line id="pop_pre[1]: v" quantity="pop_pre/1/L23PyrRS/v" scale="1mV" color="#029a72" timeScale="1ms"/>
        </Display>

        <Display id="DispPop__pop_post" title="Membrane potentials of cells in pop_post" timeScale="1ms" xmin="-30.0" xmax="330.0" ymin="-90" ymax="50">
            <Line id="pop_post[0]: v" quantity="pop_post/0/SupBasket/v" scale="1mV" color="#d340bb" timeScale="1ms"/>
            <Line id="pop_post[1]: v" quantity="pop_post/1/SupBasket/v" scale="1mV" color="#4c73a9" timeScale="1ms"/>
        </Display>

        <OutputFile id="Volts_file__pop_pre" fileName="Sim_L23TraubDemo.pop_pre.v.dat">
            <OutputColumn id="v_pop_pre_0_L23PyrRS_v" quantity="pop_pre/0/L23PyrRS/v"/>
            <OutputColumn id="v_pop_pre_1_L23PyrRS_v" quantity="pop_pre/1/L23PyrRS/v"/>
        </OutputFile>

        <OutputFile id="Volts_file__pop_post" fileName="Sim_L23TraubDemo.pop_post.v.dat">
            <OutputColumn id="v_pop_post_0_SupBasket_v" quantity="pop_post/0/SupBasket/v"/>
            <OutputColumn id="v_pop_post_1_SupBasket_v" quantity="pop_post/1/SupBasket/v"/>
        </OutputFile>

    </Simulation>

</Lems>
