<Lems>

    <!--

        This LEMS file has been automatically generated using PyNeuroML v1.3.22 (libNeuroML v0.6.8)

     -->

    <!-- Specify which component to run -->
    <Target component="Sim_VClamp"/>

    <!-- Include core NeuroML2 ComponentType definitions -->
    <Include file="Cells.xml"/>
    <Include file="Networks.xml"/>
    <Include file="Simulation.xml"/>

    <Include file="VClamp/L23PyrRS.cell.nml"/>
    <Include file="VClamp/ar__m00_25.channel.nml"/>
    <Include file="VClamp/cad__beta0_01__phi26000.nml"/>
    <Include file="VClamp/cad__beta0_05__phi52000.nml"/>
    <Include file="VClamp/cal.channel.nml"/>
    <Include file="VClamp/cat.channel.nml"/>
    <Include file="VClamp/k2.channel.nml"/>
    <Include file="VClamp/ka.channel.nml"/>
    <Include file="VClamp/kahp.channel.nml"/>
    <Include file="VClamp/kc.channel.nml"/>
    <Include file="VClamp/kdr.channel.nml"/>
    <Include file="VClamp/km.channel.nml"/>
    <Include file="VClamp/naf__a0__b0__c0__d0__fastNa_shiftmin3_5.channel.nml"/>
    <Include file="VClamp/nap.channel.nml"/>
    <Include file="VClamp/pas.channel.nml"/>
    <Include file="VClamp.net.nml"/>

    <Simulation id="Sim_VClamp" length="500.0ms" step="0.025ms" target="VClamp" seed="12345">  <!-- Note seed: ensures same random numbers used every run -->
        <Display id="Display_popRS_0_v" title="Plots of Display_popRS_0_v" timeScale="1ms" xmin="-50.0" xmax="550.0" ymin="-80" ymax="40">
            <Line id="popRS_0_L23PyrRS_0_v" quantity="popRS/0/L23PyrRS/0/v" scale="1mV" color="#d54f33" timeScale="1ms"/>
            <Line id="popRS_0_L23PyrRS_142_v" quantity="popRS/0/L23PyrRS/142/v" scale="1mV" color="#0534e4" timeScale="1ms"/>
            <Line id="popRS_0_L23PyrRS_87_v" quantity="popRS/0/L23PyrRS/87/v" scale="1mV" color="#98e752" timeScale="1ms"/>
            <Line id="popRS_0_L23PyrRS_20_v" quantity="popRS/0/L23PyrRS/20/v" scale="1mV" color="#bca074" timeScale="1ms"/>
            <Line id="popRS_0_L23PyrRS_50_v" quantity="popRS/0/L23PyrRS/50/v" scale="1mV" color="#632794" timeScale="1ms"/>
            <Line id="popRS_0_L23PyrRS_99_v" quantity="popRS/0/L23PyrRS/99/v" scale="1mV" color="#8a5d88" timeScale="1ms"/>
            <Line id="popRS_0_L23PyrRS_139_v" quantity="popRS/0/L23PyrRS/139/v" scale="1mV" color="#df5954" timeScale="1ms"/>
        </Display>

        <Display id="Display_popRS_1_v" title="Plots of Display_popRS_1_v" timeScale="1ms" xmin="-50.0" xmax="550.0" ymin="-80" ymax="40">
            <Line id="popRS_1_L23PyrRS_0_v" quantity="popRS/1/L23PyrRS/0/v" scale="1mV" color="#52c8bf" timeScale="1ms"/>
            <Line id="popRS_1_L23PyrRS_142_v" quantity="popRS/1/L23PyrRS/142/v" scale="1mV" color="#bf0239" timeScale="1ms"/>
            <Line id="popRS_1_L23PyrRS_87_v" quantity="popRS/1/L23PyrRS/87/v" scale="1mV" color="#3f9fe8" timeScale="1ms"/>
            <Line id="popRS_1_L23PyrRS_20_v" quantity="popRS/1/L23PyrRS/20/v" scale="1mV" color="#dda9d2" timeScale="1ms"/>
            <Line id="popRS_1_L23PyrRS_50_v" quantity="popRS/1/L23PyrRS/50/v" scale="1mV" color="#85ad96" timeScale="1ms"/>
            <Line id="popRS_1_L23PyrRS_99_v" quantity="popRS/1/L23PyrRS/99/v" scale="1mV" color="#59438f" timeScale="1ms"/>
            <Line id="popRS_1_L23PyrRS_139_v" quantity="popRS/1/L23PyrRS/139/v" scale="1mV" color="#5fa56f" timeScale="1ms"/>
        </Display>

        <Display id="Display_popRS_2_v" title="Plots of Display_popRS_2_v" timeScale="1ms" xmin="-50.0" xmax="550.0" ymin="-80" ymax="40">
            <Line id="popRS_2_L23PyrRS_0_v" quantity="popRS/2/L23PyrRS/0/v" scale="1mV" color="#b5b5a2" timeScale="1ms"/>
            <Line id="popRS_2_L23PyrRS_142_v" quantity="popRS/2/L23PyrRS/142/v" scale="1mV" color="#2ebe19" timeScale="1ms"/>
            <Line id="popRS_2_L23PyrRS_87_v" quantity="popRS/2/L23PyrRS/87/v" scale="1mV" color="#d30150" timeScale="1ms"/>
            <Line id="popRS_2_L23PyrRS_20_v" quantity="popRS/2/L23PyrRS/20/v" scale="1mV" color="#55490a" timeScale="1ms"/>
            <Line id="popRS_2_L23PyrRS_50_v" quantity="popRS/2/L23PyrRS/50/v" scale="1mV" color="#4bd9d0" timeScale="1ms"/>
            <Line id="popRS_2_L23PyrRS_99_v" quantity="popRS/2/L23PyrRS/99/v" scale="1mV" color="#69535e" timeScale="1ms"/>
            <Line id="popRS_2_L23PyrRS_139_v" quantity="popRS/2/L23PyrRS/139/v" scale="1mV" color="#27dae9" timeScale="1ms"/>
        </Display>

        <Display id="Display_popRS_3_v" title="Plots of Display_popRS_3_v" timeScale="1ms" xmin="-50.0" xmax="550.0" ymin="-80" ymax="40">
            <Line id="popRS_3_L23PyrRS_0_v" quantity="popRS/3/L23PyrRS/0/v" scale="1mV" color="#6143ed" timeScale="1ms"/>
            <Line id="popRS_3_L23PyrRS_142_v" quantity="popRS/3/L23PyrRS/142/v" scale="1mV" color="#aee102" timeScale="1ms"/>
            <Line id="popRS_3_L23PyrRS_87_v" quantity="popRS/3/L23PyrRS/87/v" scale="1mV" color="#a4e245" timeScale="1ms"/>
            <Line id="popRS_3_L23PyrRS_20_v" quantity="popRS/3/L23PyrRS/20/v" scale="1mV" color="#0c0af9" timeScale="1ms"/>
            <Line id="popRS_3_L23PyrRS_50_v" quantity="popRS/3/L23PyrRS/50/v" scale="1mV" color="#eaece2" timeScale="1ms"/>
            <Line id="popRS_3_L23PyrRS_99_v" quantity="popRS/3/L23PyrRS/99/v" scale="1mV" color="#add546" timeScale="1ms"/>
            <Line id="popRS_3_L23PyrRS_139_v" quantity="popRS/3/L23PyrRS/139/v" scale="1mV" color="#0dc1e8" timeScale="1ms"/>
        </Display>

        <OutputFile id="Sim_VClamp_popRS_0_v_dat" fileName="Sim_VClamp.popRS.0.v.dat">
            <OutputColumn id="popRS_0_L23PyrRS_0_v" quantity="popRS/0/L23PyrRS/0/v"/>
            <OutputColumn id="popRS_0_L23PyrRS_142_v" quantity="popRS/0/L23PyrRS/142/v"/>
            <OutputColumn id="popRS_0_L23PyrRS_87_v" quantity="popRS/0/L23PyrRS/87/v"/>
            <OutputColumn id="popRS_0_L23PyrRS_20_v" quantity="popRS/0/L23PyrRS/20/v"/>
            <OutputColumn id="popRS_0_L23PyrRS_50_v" quantity="popRS/0/L23PyrRS/50/v"/>
            <OutputColumn id="popRS_0_L23PyrRS_99_v" quantity="popRS/0/L23PyrRS/99/v"/>
            <OutputColumn id="popRS_0_L23PyrRS_139_v" quantity="popRS/0/L23PyrRS/139/v"/>
        </OutputFile>

        <OutputFile id="Sim_VClamp_popRS_1_v_dat" fileName="Sim_VClamp.popRS.1.v.dat">
            <OutputColumn id="popRS_1_L23PyrRS_0_v" quantity="popRS/1/L23PyrRS/0/v"/>
            <OutputColumn id="popRS_1_L23PyrRS_142_v" quantity="popRS/1/L23PyrRS/142/v"/>
            <OutputColumn id="popRS_1_L23PyrRS_87_v" quantity="popRS/1/L23PyrRS/87/v"/>
            <OutputColumn id="popRS_1_L23PyrRS_20_v" quantity="popRS/1/L23PyrRS/20/v"/>
            <OutputColumn id="popRS_1_L23PyrRS_50_v" quantity="popRS/1/L23PyrRS/50/v"/>
            <OutputColumn id="popRS_1_L23PyrRS_99_v" quantity="popRS/1/L23PyrRS/99/v"/>
            <OutputColumn id="popRS_1_L23PyrRS_139_v" quantity="popRS/1/L23PyrRS/139/v"/>
        </OutputFile>

        <OutputFile id="Sim_VClamp_popRS_2_v_dat" fileName="Sim_VClamp.popRS.2.v.dat">
            <OutputColumn id="popRS_2_L23PyrRS_0_v" quantity="popRS/2/L23PyrRS/0/v"/>
            <OutputColumn id="popRS_2_L23PyrRS_142_v" quantity="popRS/2/L23PyrRS/142/v"/>
            <OutputColumn id="popRS_2_L23PyrRS_87_v" quantity="popRS/2/L23PyrRS/87/v"/>
            <OutputColumn id="popRS_2_L23PyrRS_20_v" quantity="popRS/2/L23PyrRS/20/v"/>
            <OutputColumn id="popRS_2_L23PyrRS_50_v" quantity="popRS/2/L23PyrRS/50/v"/>
            <OutputColumn id="popRS_2_L23PyrRS_99_v" quantity="popRS/2/L23PyrRS/99/v"/>
            <OutputColumn id="popRS_2_L23PyrRS_139_v" quantity="popRS/2/L23PyrRS/139/v"/>
        </OutputFile>

        <OutputFile id="Sim_VClamp_popRS_3_v_dat" fileName="Sim_VClamp.popRS.3.v.dat">
            <OutputColumn id="popRS_3_L23PyrRS_0_v" quantity="popRS/3/L23PyrRS/0/v"/>
            <OutputColumn id="popRS_3_L23PyrRS_142_v" quantity="popRS/3/L23PyrRS/142/v"/>
            <OutputColumn id="popRS_3_L23PyrRS_87_v" quantity="popRS/3/L23PyrRS/87/v"/>
            <OutputColumn id="popRS_3_L23PyrRS_20_v" quantity="popRS/3/L23PyrRS/20/v"/>
            <OutputColumn id="popRS_3_L23PyrRS_50_v" quantity="popRS/3/L23PyrRS/50/v"/>
            <OutputColumn id="popRS_3_L23PyrRS_99_v" quantity="popRS/3/L23PyrRS/99/v"/>
            <OutputColumn id="popRS_3_L23PyrRS_139_v" quantity="popRS/3/L23PyrRS/139/v"/>
        </OutputFile>

        <OutputFile id="v_clamps_i_cell1_seg0_dat" fileName="v_clamps_i_cell1_seg0.dat">
            <OutputColumn id="popRS_1_L23PyrRS_0_vclamp_cell1_seg0_i" quantity="popRS/1/L23PyrRS/0/vclamp_cell1_seg0/i"/>
        </OutputFile>

        <OutputFile id="v_clamps_i_cell2_seg0_dat" fileName="v_clamps_i_cell2_seg0.dat">
            <OutputColumn id="popRS_2_L23PyrRS_0_vclamp_cell2_seg0_i" quantity="popRS/2/L23PyrRS/0/vclamp_cell2_seg0/i"/>
        </OutputFile>

        <OutputFile id="v_clamps_i_cell2_seg142_dat" fileName="v_clamps_i_cell2_seg142.dat">
            <OutputColumn id="popRS_2_L23PyrRS_142_vclamp_cell2_seg142_i" quantity="popRS/2/L23PyrRS/142/vclamp_cell2_seg142/i"/>
        </OutputFile>

        <OutputFile id="v_clamps_i_cell3_seg0_dat" fileName="v_clamps_i_cell3_seg0.dat">
            <OutputColumn id="popRS_3_L23PyrRS_0_vclamp_cell3_seg0_i" quantity="popRS/3/L23PyrRS/0/vclamp_cell3_seg0/i"/>
        </OutputFile>

        <OutputFile id="v_clamps_i_cell3_seg142_dat" fileName="v_clamps_i_cell3_seg142.dat">
            <OutputColumn id="popRS_3_L23PyrRS_142_vclamp_cell3_seg142_i" quantity="popRS/3/L23PyrRS/142/vclamp_cell3_seg142/i"/>
        </OutputFile>

        <OutputFile id="v_clamps_i_cell3_seg87_dat" fileName="v_clamps_i_cell3_seg87.dat">
            <OutputColumn id="popRS_3_L23PyrRS_87_vclamp_cell3_seg87_i" quantity="popRS/3/L23PyrRS/87/vclamp_cell3_seg87/i"/>
        </OutputFile>

    </Simulation>

</Lems>
