<neuroml xmlns="http://www.neuroml.org/schema/neuroml2"  xmlns:xs="http://www.w3.org/2001/XMLSchema" xmlns:xsi="http://www.w3.org/2001/XMLSchema-instance" xsi:schemaLocation="http://www.neuroml.org/schema/neuroml2 https://raw.github.com/NeuroML/NeuroML2/development/Schemas/NeuroML2/NeuroML_v2beta4.xsd" id="SpikingNet">
    <notes>

This NeuroML 2 file was generated by OpenCortex v0.0.2 using:
    libNeuroML v0.2.12
    pyNeuroML v0.1.7

    </notes>
    <property tag="Python random seed" value="1234"/>
    <include href="../NeuroML2/prototypes/izhikevich/RS.cell.nml"></include>
    <expTwoSynapse id="syn0" gbase="1nS" erev="0mV" tauDecay="10ms" tauRise="0.5ms"/>
    <poissonFiringSynapse id="poissonFiringSyn" averageRate="150 Hz" synapse="syn0" spikeTarget="./syn0"/>
    <network id="SpikingNet">
        <population id="pop0" component="RS" size="10" type="populationList">
            <instance id="0">
                <location x="96.645353569199997" y="44.073259917500003" z="0.749147005859"/>
            </instance>
            <instance id="1">
                <location x="91.097596244900004" y="93.926899736400003" z="58.222757305899997"/>
            </instance>
            <instance id="2">
                <location x="67.156348148800006" y="8.393822683710001" z="76.648093279199998"/>
            </instance>
            <instance id="3">
                <location x="23.680977536299999" y="3.08140217266" z="78.877271723600003"/>
            </instance>
            <instance id="4">
                <location x="34.6088965597" y="62.328147503899999" z="61.581569510400001"/>
            </instance>
            <instance id="5">
                <location x="14.8554638708" y="18.309064741" z="11.4412969689"/>
            </instance>
            <instance id="6">
                <location x="1.46187804869" y="48.675154060499999" z="96.490156091599999"/>
            </instance>
            <instance id="7">
                <location x="6.45622809772" y="54.108818555100001" z="46.589855900800003"/>
            </instance>
            <instance id="8">
                <location x="60.146344956100002" y="8.89288299907" z="57.900268618699997"/>
            </instance>
            <instance id="9">
                <location x="26.9585503819" y="55.643256055599998" z="64.463423417800001"/>
            </instance>
        </population>
        <population id="pop1" component="RS" size="10" type="populationList">
            <instance id="0">
                <location x="48.103637136700002" y="171.047829489000009" z="24.915212136099999"/>
            </instance>
            <instance id="1">
                <location x="93.351549804200005" y="190.677603895000004" z="53.016120691200001"/>
            </instance>
            <instance id="2">
                <location x="1.92995663097" y="201.620385155999998" z="0.578023741774"/>
            </instance>
            <instance id="3">
                <location x="14.376842759600001" y="194.565385069000001" z="37.7347440773"/>
            </instance>
            <instance id="4">
                <location x="5.41751986461" y="217.50570162599999" z="16.400322374200002"/>
            </instance>
            <instance id="5">
                <location x="55.733023744100002" y="128.849144319999994" z="93.730708469600003"/>
            </instance>
            <instance id="6">
                <location x="77.097997152000005" y="291.386624470000015" z="14.122776441599999"/>
            </instance>
            <instance id="7">
                <location x="30.539270828799999" y="107.917924846000005" z="27.678369479200001"/>
            </instance>
            <instance id="8">
                <location x="80.651250511599997" y="135.468607055999996" z="15.4570514711"/>
            </instance>
            <instance id="9">
                <location x="95.471865570199995" y="130.910280018000009" z="83.388929415099994"/>
            </instance>
        </population>
        <projection id="proj0_pop0_pop1" presynapticPopulation="pop0" postsynapticPopulation="pop1" synapse="syn0">
            <connection id="0" preCellId="../pop0/0/RS" postCellId="../pop1/1/RS"/>
            <connection id="1" preCellId="../pop0/0/RS" postCellId="../pop1/2/RS"/>
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        </projection>
        <inputList id="Stim0" population="pop0" component="poissonFiringSyn">
            <input id="0" target="../pop0/0/RS" destination="synapses"/>
            <input id="0" target="../pop0/1/RS" destination="synapses"/>
            <input id="0" target="../pop0/2/RS" destination="synapses"/>
            <input id="0" target="../pop0/3/RS" destination="synapses"/>
            <input id="0" target="../pop0/4/RS" destination="synapses"/>
            <input id="0" target="../pop0/5/RS" destination="synapses"/>
            <input id="0" target="../pop0/6/RS" destination="synapses"/>
            <input id="0" target="../pop0/7/RS" destination="synapses"/>
            <input id="0" target="../pop0/8/RS" destination="synapses"/>
            <input id="0" target="../pop0/9/RS" destination="synapses"/>
        </inputList>
    </network>
</neuroml>
