<neuroml xmlns="http://www.neuroml.org/schema/neuroml2"  xmlns:xs="http://www.w3.org/2001/XMLSchema" xmlns:xsi="http://www.w3.org/2001/XMLSchema-instance" xsi:schemaLocation="http://www.neuroml.org/schema/neuroml2 https://raw.github.com/NeuroML/NeuroML2/development/Schemas/NeuroML2/NeuroML_v2beta5.xsd" id="VClamp">
    <notes>

This NeuroML 2 file was generated by OpenCortex v0.1.10 using:
    libNeuroML v0.2.42
    pyNeuroML v0.3.12

    </notes>
    <property tag="Network seed" value="1234"/>
    <include href="VClamp/L23PyrRS.cell.nml"/>
    <include href="VClamp/ar__m00_25.channel.nml"/>
    <include href="VClamp/cad__beta0_01__phi26000.nml"/>
    <include href="VClamp/cad__beta0_05__phi52000.nml"/>
    <include href="VClamp/cal.channel.nml"/>
    <include href="VClamp/cat.channel.nml"/>
    <include href="VClamp/k2.channel.nml"/>
    <include href="VClamp/ka.channel.nml"/>
    <include href="VClamp/kahp.channel.nml"/>
    <include href="VClamp/kc.channel.nml"/>
    <include href="VClamp/kdr.channel.nml"/>
    <include href="VClamp/km.channel.nml"/>
    <include href="VClamp/naf__a0__b0__c0__d0__fastNa_shiftmin3_5.channel.nml"/>
    <include href="VClamp/nap.channel.nml"/>
    <include href="VClamp/pas.channel.nml"/>
    <expTwoSynapse id="syn0" gbase="1nS" erev="0mV" tauDecay="10ms" tauRise="0.5ms"/>
    <voltageClampTriple id="vclamp0" active="1.0" delay="0ms" duration="500ms" conditioningVoltage="-70mV" testingVoltage="-70mV" returnVoltage="-70mV" simpleSeriesResistance="1e1ohm"/>
    <poissonFiringSynapse id="poissonFiringSyn" averageRate="20 Hz" synapse="syn0" spikeTarget="./syn0"/>
    <network id="VClamp" type="networkWithTemperature" temperature="32degC">
        <population id="popRS" component="L23PyrRS" size="1" type="populationList">
            <instance id="0">
                <location x="0." y="0." z="0."/>
            </instance>
        </population>
        <inputList id="pfs_noise" population="popRS" component="poissonFiringSyn">
            <input id="0" target="../popRS/0/L23PyrRS" destination="synapses" segmentId="125" fractionAlong="0.504780528715"/>
            <input id="1" target="../popRS/0/L23PyrRS" destination="synapses" segmentId="61" fractionAlong="0.0581935350752"/>
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        </inputList>
        <inputList id="vClamp_seg0" population="popRS" component="vclamp0">
            <input id="0" target="../popRS/0/L23PyrRS" destination="synapses" segmentId="0" fractionAlong="0.5"/>
        </inputList>
        <inputList id="vClamp_seg142" population="popRS" component="vclamp0">
            <input id="0" target="../popRS/0/L23PyrRS" destination="synapses" segmentId="142" fractionAlong="0.5"/>
        </inputList>
    </network>
</neuroml>
